<?xml version="1.0" encoding="UTF-8"?>
<channelml xmlns="http://morphml.org/channelml/schema" xmlns:xsi="http://www.w3.org/2001/XMLSchema-instance" xmlns:meta="http://morphml.org/metadata/schema"
xsi:schemaLocation="http://morphml.org/channelml/schema  http://www.neuroml.org/NeuroMLValidator/NeuroMLFiles/Schemata/v1.8.1/Level2/ChannelML_v1.8.1.xsd" units="Physiological Units">

    <ion name="ca" charge="2" role="SignallingSubstance">
        <meta:notes>Signifies that the ion is involved in a process which alters its concentration</meta:notes>
    </ion>

    <ion_concentration name="CaDynamics_E2">

        <status value="in_progress"/>

        <meta:notes>...</meta:notes>

        <meta:authorList>
            <meta:modelAuthor>
                <meta:name>...</meta:name>
            </meta:modelAuthor>
        </meta:authorList>

        <meta:publication>
            <meta:fullTitle>....</meta:fullTitle>
            <meta:pubmedRef>...</meta:pubmedRef>
        </meta:publication>

        <ion_species name="ca"/>

        <decaying_pool_model resting_conc="1e-10" decay_constant="80">
            <pool_volume_info shell_thickness = "2.444e-4"/>
        </decaying_pool_model>

    </ion_concentration>
</channelml>
